// SBML level 3 version 2

model IVD_NP_RNM_enriched()
  // IVD NP Cell Signaling Regulatory Network Model (Enriched)
  // IVD NP Cell Signaling Regulatory Network Model
  // A Network-Based Approach to Understanding Key Signaling Pathways in Intervertebral Disc Biology.
  // Network: 82 proteins, 147 activation edges, 52 inhibition edges.
  // Mathematical framework: Semi-quantitative Mendoza ODE system (Mendoza & Xenarios, 2006). Each species rate rule encodes dx/dt = sigmoid(omega; h=10) - gamma*x, where omega aggregates all upstream activator and inhibitor inputs.
  // Parameters: h=10 (sigmoid steepness), gamma=1 (decay), alpha=beta=1 (uniform interaction weights).
  // model units - time: time_unit

  // Compartments:
  compartment cell = 1; cell is "NP Cell";

  // Species:
  species ACAN in cell = 0.9999227;
  species COL1A in cell = 1.072955e-40;
  species COL2A in cell = 0.986251;
  species COL10A1 in cell = 1.073065e-40;
  species TSP_1 in cell = 0.9999961; TSP_1 is "TSP-1";
  species TGF_beta in cell = 0.9243014; TGF_beta is "TGF-β";
  species TGFBRI in cell = 0.9966877;
  species BMP in cell = 5.38405e-40;
  species BMPR in cell = 4.558614e-40;
  species GDF5 in cell = 0.9997693;
  species ALK6 in cell = 0.9999922;
  species IGF1 in cell = 0.9999961;
  species IGF1R in cell = 0.9999999;
  species CCN2 in cell = 0.9839799;
  species PGRN in cell = 1.870712e-44;
  species SMAD2 in cell = 0.9998848;
  species SMAD3 in cell = 0.9998848;
  species SMAD2_3 in cell = 0.9998848; SMAD2_3 is "SMAD2/3";
  species SMAD1_5_8 in cell = 0.9298942; SMAD1_5_8 is "SMAD1/5/8";
  species Sox9 in cell = 0.9932873;
  species ADAMTS4_5 in cell = 5.384086e-40; ADAMTS4_5 is "ADAMTS4/5";
  species MMP1 in cell = 5.019568e-43;
  species MMP2 in cell = 4.965894e-43;
  species MMP3 in cell = 2.085409e-40;
  species MMP9 in cell = 2.675993e-40;
  species MMP13 in cell = 8.784373e-41;
  species TIMP1_2 in cell = 0.9999961; TIMP1_2 is "TIMP1/2";
  species TIMP3 in cell = 0.9532207;
  species VEGF in cell = 9.882648e-8;
  species IL_1beta in cell = 9.93558e-40; IL_1beta is "IL-1β";
  species IL_1R1 in cell = 8.589409e-40; IL_1R1 is "IL-1R1";
  species IL_6 in cell = 7.998709e-40; IL_6 is "IL-6";
  species IL_6R in cell = 7.231169e-40; IL_6R is "IL-6R";
  species IL_17 in cell = 4.607762e-42; IL_17 is "IL-17";
  species IL_17RA in cell = 4.588268e-42; IL_17RA is "IL-17RA";
  species IL_18 in cell = 5.384061e-40; IL_18 is "IL-18";
  species IL_18RA in cell = 4.558158e-40; IL_18RA is "IL-18RA";
  species IL_12 in cell = 1.094946e-39; IL_12 is "IL-12";
  species IL_12R in cell = 9.329269e-40; IL_12R is "IL-12R";
  species IFN_gamma in cell = 5.384019e-40; IFN_gamma is "IFN-γ";
  species IFN_gammaR in cell = 4.557695e-40; IFN_gammaR is "IFN-γR";
  species TNF in cell = 1.727921e-40;
  species TNFR1 in cell = 1.616717e-40;
  species IL_10 in cell = 0.9690245; IL_10 is "IL-10";
  species IL_10R1 in cell = 0.9988572; IL_10R1 is "IL-10R1";
  species IL_4 in cell = 0.04534777; IL_4 is "IL-4";
  species IL_4R in cell = 0.009390985; IL_4R is "IL-4R";
  species IL_1Ra in cell = 0.2050305; IL_1Ra is "IL-1Ra";
  species CSF2 in cell = 8.589326e-40;
  species GMR in cell = 7.279027e-40;
  species CCL3_4 in cell = 3.763773e-40; CCL3_4 is "CCL3/4";
  species IL_8 in cell = 2.156231e-40; IL_8 is "IL-8";
  species CXCR1 in cell = 2.000572e-40;
  species TLR in cell = 1.072397e-39;
  species iNOS in cell = 0.009427739;
  species p65 in cell = 6.093026e-40;
  species IkBalpha in cell = 1; IkBalpha is "IkBα";
  species Ikk in cell = 7.325663e-40;
  species TRAF6 in cell = 8.785484e-40;
  species Act1 in cell = 5.636621e-42;
  species ERK in cell = 0.9225716;
  species c_Jun in cell = 1.299617e-39; c_Jun is "c-Jun";
  species JNK in cell = 1.244168e-39;
  species p38 in cell = 1.858226e-41;
  species CREB in cell = 0.9988576;
  species AP_1 in cell = 1.554059e-39; AP_1 is "AP-1";
  species JAK in cell = 0.2372913;
  species STAT1 in cell = 0.09980524;
  species STAT3 in cell = 0.2298979;
  species STAT6 in cell = 0.2298979;
  species SOCS_3 in cell = 0.2050305; SOCS_3 is "SOCS-3";
  species akt1 in cell = 0.9863537;
  species SIRT1 in cell = 2.491073e-42;
  species SIRT2 in cell = 1.849281e-44;
  species ROS in cell = 2.859464e-41;
  species FOXO in cell = 2.066203e-42;
  species wnt3a in cell = 1.359975e-40;
  species wnt5a in cell = 5.38407e-40;
  species beta_catenin in cell = 1.188039e-40; beta_catenin is "β-catenin";
  species CGRP in cell = 8.589423e-40;
  species GATA3 in cell = 0.1154884;
  species RUNX2 in cell = 1.187948e-40;

  // Parameters:
  h = 10; h is "Hill gain (sigmoid steepness)";
  gamma = 1; gamma is "Decay constant";

  // Rate rules:
  ACAN' = (-exp(0.5*h) + exp(-1*h*((2 + 1)/2*((SMAD2_3 + Sox9)/(1 + SMAD2_3 + Sox9))*(1 - (2 + 1)/2*((TLR + beta_catenin)/(1 + TLR + beta_catenin))) - 0.5)))/((1 - exp(0.5*h))*(1 + exp(-1*h*((2 + 1)/2*((SMAD2_3 + Sox9)/(1 + SMAD2_3 + Sox9))*(1 - (2 + 1)/2*((TLR + beta_catenin)/(1 + TLR + beta_catenin))) - 0.5)))) - gamma*ACAN;
  COL1A' = (-exp(0.5*h) + exp(-1*h*((1 + 1)/1*(RUNX2/(1 + RUNX2)) - 0.5)))/((1 - exp(0.5*h))*(1 + exp(-1*h*((1 + 1)/1*(RUNX2/(1 + RUNX2)) - 0.5)))) - gamma*COL1A;
  COL2A' = (-exp(0.5*h) + exp(-1*h*((3 + 1)/3*((SMAD2_3 + Sox9 + SIRT2)/(1 + SMAD2_3 + Sox9 + SIRT2))*(1 - (1 + 1)/1*(TLR/(1 + TLR))) - 0.5)))/((1 - exp(0.5*h))*(1 + exp(-1*h*((3 + 1)/3*((SMAD2_3 + Sox9 + SIRT2)/(1 + SMAD2_3 + Sox9 + SIRT2))*(1 - (1 + 1)/1*(TLR/(1 + TLR))) - 0.5)))) - gamma*COL2A;
  COL10A1' = (-exp(0.5*h) + exp(-1*h*((1 + 1)/1*(RUNX2/(1 + RUNX2)) - 0.5)))/((1 - exp(0.5*h))*(1 + exp(-1*h*((1 + 1)/1*(RUNX2/(1 + RUNX2)) - 0.5)))) - gamma*COL10A1;
  TSP_1' = (-exp(0.5*h) + exp(-1*h*((1 + 1)/1*(SMAD2/(1 + SMAD2))*(1 - (1 + 1)/1*(p65/(1 + p65))) - 0.5)))/((1 - exp(0.5*h))*(1 + exp(-1*h*((1 + 1)/1*(SMAD2/(1 + SMAD2))*(1 - (1 + 1)/1*(p65/(1 + p65))) - 0.5)))) - gamma*TSP_1;
  TGF_beta' = (-exp(0.5*h) + exp(-1*h*(1 - (2 + 1)/2*((p65 + SOCS_3)/(1 + p65 + SOCS_3)) - 0.5)))/((1 - exp(0.5*h))*(1 + exp(-1*h*(1 - (2 + 1)/2*((p65 + SOCS_3)/(1 + p65 + SOCS_3)) - 0.5)))) - gamma*TGF_beta;
  TGFBRI' = (-exp(0.5*h) + exp(-1*h*((1 + 1)/1*(TGF_beta/(1 + TGF_beta)) - 0.5)))/((1 - exp(0.5*h))*(1 + exp(-1*h*((1 + 1)/1*(TGF_beta/(1 + TGF_beta)) - 0.5)))) - gamma*TGFBRI;
  BMP' = (-exp(0.5*h) + exp(-1*h*((1 + 1)/1*(p65/(1 + p65)) - 0.5)))/((1 - exp(0.5*h))*(1 + exp(-1*h*((1 + 1)/1*(p65/(1 + p65)) - 0.5)))) - gamma*BMP;
  BMPR' = (-exp(0.5*h) + exp(-1*h*((1 + 1)/1*(BMP/(1 + BMP)) - 0.5)))/((1 - exp(0.5*h))*(1 + exp(-1*h*((1 + 1)/1*(BMP/(1 + BMP)) - 0.5)))) - gamma*BMPR;
  GDF5' = (-exp(0.5*h) + exp(-1*h*((1 + 1)/1*(Sox9/(1 + Sox9))*(1 - (1 + 1)/1*(IL_1beta/(1 + IL_1beta))) - 0.5)))/((1 - exp(0.5*h))*(1 + exp(-1*h*((1 + 1)/1*(Sox9/(1 + Sox9))*(1 - (1 + 1)/1*(IL_1beta/(1 + IL_1beta))) - 0.5)))) - gamma*GDF5;
  ALK6' = (-exp(0.5*h) + exp(-1*h*((1 + 1)/1*(GDF5/(1 + GDF5)) - 0.5)))/((1 - exp(0.5*h))*(1 + exp(-1*h*((1 + 1)/1*(GDF5/(1 + GDF5)) - 0.5)))) - gamma*ALK6;
  IGF1' = (-exp(0.5*h) + exp(-1*h*((1 + 1)/1*(SMAD2_3/(1 + SMAD2_3))*(1 - (1 + 1)/1*(IL_1beta/(1 + IL_1beta))) - 0.5)))/((1 - exp(0.5*h))*(1 + exp(-1*h*((1 + 1)/1*(SMAD2_3/(1 + SMAD2_3))*(1 - (1 + 1)/1*(IL_1beta/(1 + IL_1beta))) - 0.5)))) - gamma*IGF1;
  IGF1R' = (-exp(0.5*h) + exp(-1*h*((1 + 1)/1*(IGF1/(1 + IGF1)) - 0.5)))/((1 - exp(0.5*h))*(1 + exp(-1*h*((1 + 1)/1*(IGF1/(1 + IGF1)) - 0.5)))) - gamma*IGF1R;
  CCN2' = (-exp(0.5*h) + exp(-1*h*((3 + 1)/3*((TGF_beta + SMAD3 + AP_1)/(1 + TGF_beta + SMAD3 + AP_1))*(1 - (1 + 1)/1*(beta_catenin/(1 + beta_catenin))) - 0.5)))/((1 - exp(0.5*h))*(1 + exp(-1*h*((3 + 1)/3*((TGF_beta + SMAD3 + AP_1)/(1 + TGF_beta + SMAD3 + AP_1))*(1 - (1 + 1)/1*(beta_catenin/(1 + beta_catenin))) - 0.5)))) - gamma*CCN2;
  PGRN' = (-exp(0.5*h) + exp(-1*h*(0 - 0.5)))/((1 - exp(0.5*h))*(1 + exp(-1*h*(0 - 0.5)))) - gamma*PGRN;
  SMAD2' = (-exp(0.5*h) + exp(-1*h*((1 + 1)/1*(TGFBRI/(1 + TGFBRI)) - 0.5)))/((1 - exp(0.5*h))*(1 + exp(-1*h*((1 + 1)/1*(TGFBRI/(1 + TGFBRI)) - 0.5)))) - gamma*SMAD2;
  SMAD3' = (-exp(0.5*h) + exp(-1*h*((1 + 1)/1*(TGFBRI/(1 + TGFBRI)) - 0.5)))/((1 - exp(0.5*h))*(1 + exp(-1*h*((1 + 1)/1*(TGFBRI/(1 + TGFBRI)) - 0.5)))) - gamma*SMAD3;
  SMAD2_3' = (-exp(0.5*h) + exp(-1*h*((1 + 1)/1*(TGFBRI/(1 + TGFBRI)) - 0.5)))/((1 - exp(0.5*h))*(1 + exp(-1*h*((1 + 1)/1*(TGFBRI/(1 + TGFBRI)) - 0.5)))) - gamma*SMAD2_3;
  SMAD1_5_8' = (-exp(0.5*h) + exp(-1*h*((2 + 1)/2*((BMPR + ALK6)/(1 + BMPR + ALK6)) - 0.5)))/((1 - exp(0.5*h))*(1 + exp(-1*h*((2 + 1)/2*((BMPR + ALK6)/(1 + BMPR + ALK6)) - 0.5)))) - gamma*SMAD1_5_8;
  Sox9' = (-exp(0.5*h) + exp(-1*h*((4 + 1)/4*((TGFBRI + SMAD1_5_8 + akt1 + wnt5a)/(1 + TGFBRI + SMAD1_5_8 + akt1 + wnt5a))*(1 - (1 + 1)/1*(p65/(1 + p65))) - 0.5)))/((1 - exp(0.5*h))*(1 + exp(-1*h*((4 + 1)/4*((TGFBRI + SMAD1_5_8 + akt1 + wnt5a)/(1 + TGFBRI + SMAD1_5_8 + akt1 + wnt5a))*(1 - (1 + 1)/1*(p65/(1 + p65))) - 0.5)))) - gamma*Sox9;
  ADAMTS4_5' = (-exp(0.5*h) + exp(-1*h*((1 + 1)/1*(p65/(1 + p65)) - 0.5)))/((1 - exp(0.5*h))*(1 + exp(-1*h*((1 + 1)/1*(p65/(1 + p65)) - 0.5)))) - gamma*ADAMTS4_5;
  MMP1' = (-exp(0.5*h) + exp(-1*h*((1 + 1)/1*(beta_catenin/(1 + beta_catenin))*(1 - (1 + 1)/1*(akt1/(1 + akt1))) - 0.5)))/((1 - exp(0.5*h))*(1 + exp(-1*h*((1 + 1)/1*(beta_catenin/(1 + beta_catenin))*(1 - (1 + 1)/1*(akt1/(1 + akt1))) - 0.5)))) - gamma*MMP1;
  MMP2' = (-exp(0.5*h) + exp(-1*h*((1 + 1)/1*(beta_catenin/(1 + beta_catenin))*(1 - (1 + 1)/1*(akt1/(1 + akt1))) - 0.5)))/((1 - exp(0.5*h))*(1 + exp(-1*h*((1 + 1)/1*(beta_catenin/(1 + beta_catenin))*(1 - (1 + 1)/1*(akt1/(1 + akt1))) - 0.5)))) - gamma*MMP2;
  MMP3' = (-exp(0.5*h) + exp(-1*h*((4 + 1)/4*((p65 + c_Jun + p38 + beta_catenin)/(1 + p65 + c_Jun + p38 + beta_catenin))*(1 - (2 + 1)/2*((akt1 + wnt5a)/(1 + akt1 + wnt5a))) - 0.5)))/((1 - exp(0.5*h))*(1 + exp(-1*h*((4 + 1)/4*((p65 + c_Jun + p38 + beta_catenin)/(1 + p65 + c_Jun + p38 + beta_catenin))*(1 - (2 + 1)/2*((akt1 + wnt5a)/(1 + akt1 + wnt5a))) - 0.5)))) - gamma*MMP3;
  MMP9' = (-exp(0.5*h) + exp(-1*h*((2 + 1)/2*((p65 + beta_catenin)/(1 + p65 + beta_catenin))*(1 - (1 + 1)/1*(STAT3/(1 + STAT3))) - 0.5)))/((1 - exp(0.5*h))*(1 + exp(-1*h*((2 + 1)/2*((p65 + beta_catenin)/(1 + p65 + beta_catenin))*(1 - (1 + 1)/1*(STAT3/(1 + STAT3))) - 0.5)))) - gamma*MMP9;
  MMP13' = (-exp(0.5*h) + exp(-1*h*((2 + 1)/2*((p65 + beta_catenin)/(1 + p65 + beta_catenin))*(1 - (2 + 1)/2*((akt1 + wnt5a)/(1 + akt1 + wnt5a))) - 0.5)))/((1 - exp(0.5*h))*(1 + exp(-1*h*((2 + 1)/2*((p65 + beta_catenin)/(1 + p65 + beta_catenin))*(1 - (2 + 1)/2*((akt1 + wnt5a)/(1 + akt1 + wnt5a))) - 0.5)))) - gamma*MMP13;
  TIMP1_2' = (-exp(0.5*h) + exp(-1*h*((1 + 1)/1*(SMAD2_3/(1 + SMAD2_3))*(1 - (1 + 1)/1*(p65/(1 + p65))) - 0.5)))/((1 - exp(0.5*h))*(1 + exp(-1*h*((1 + 1)/1*(SMAD2_3/(1 + SMAD2_3))*(1 - (1 + 1)/1*(p65/(1 + p65))) - 0.5)))) - gamma*TIMP1_2;
  TIMP3' = (-exp(0.5*h) + exp(-1*h*((3 + 1)/3*((SMAD3 + STAT3 + STAT6)/(1 + SMAD3 + STAT3 + STAT6))*(1 - (1 + 1)/1*(p65/(1 + p65))) - 0.5)))/((1 - exp(0.5*h))*(1 + exp(-1*h*((3 + 1)/3*((SMAD3 + STAT3 + STAT6)/(1 + SMAD3 + STAT3 + STAT6))*(1 - (1 + 1)/1*(p65/(1 + p65))) - 0.5)))) - gamma*TIMP3;
  VEGF' = (-exp(0.5*h) + exp(-1*h*((3 + 1)/3*((SMAD3 + STAT1 + STAT3)/(1 + SMAD3 + STAT1 + STAT3))*(1 - (1 + 1)/1*(TSP_1/(1 + TSP_1))) - 0.5)))/((1 - exp(0.5*h))*(1 + exp(-1*h*((3 + 1)/3*((SMAD3 + STAT1 + STAT3)/(1 + SMAD3 + STAT1 + STAT3))*(1 - (1 + 1)/1*(TSP_1/(1 + TSP_1))) - 0.5)))) - gamma*VEGF;
  IL_1beta' = (-exp(0.5*h) + exp(-1*h*((2 + 1)/2*((p65 + AP_1)/(1 + p65 + AP_1))*(1 - (2 + 1)/2*((IL_1Ra + SIRT1)/(1 + IL_1Ra + SIRT1))) - 0.5)))/((1 - exp(0.5*h))*(1 + exp(-1*h*((2 + 1)/2*((p65 + AP_1)/(1 + p65 + AP_1))*(1 - (2 + 1)/2*((IL_1Ra + SIRT1)/(1 + IL_1Ra + SIRT1))) - 0.5)))) - gamma*IL_1beta;
  IL_1R1' = (-exp(0.5*h) + exp(-1*h*((1 + 1)/1*(IL_1beta/(1 + IL_1beta)) - 0.5)))/((1 - exp(0.5*h))*(1 + exp(-1*h*((1 + 1)/1*(IL_1beta/(1 + IL_1beta)) - 0.5)))) - gamma*IL_1R1;
  IL_6' = (-exp(0.5*h) + exp(-1*h*((2 + 1)/2*((p65 + AP_1)/(1 + p65 + AP_1))*(1 - (1 + 1)/1*(STAT3/(1 + STAT3))) - 0.5)))/((1 - exp(0.5*h))*(1 + exp(-1*h*((2 + 1)/2*((p65 + AP_1)/(1 + p65 + AP_1))*(1 - (1 + 1)/1*(STAT3/(1 + STAT3))) - 0.5)))) - gamma*IL_6;
  IL_6R' = (-exp(0.5*h) + exp(-1*h*((1 + 1)/1*(IL_6/(1 + IL_6)) - 0.5)))/((1 - exp(0.5*h))*(1 + exp(-1*h*((1 + 1)/1*(IL_6/(1 + IL_6)) - 0.5)))) - gamma*IL_6R;
  IL_17' = (-exp(0.5*h) + exp(-1*h*((2 + 1)/2*((IL_6 + TNF)/(1 + IL_6 + TNF))*(1 - (1 + 1)/1*(IL_10/(1 + IL_10))) - 0.5)))/((1 - exp(0.5*h))*(1 + exp(-1*h*((2 + 1)/2*((IL_6 + TNF)/(1 + IL_6 + TNF))*(1 - (1 + 1)/1*(IL_10/(1 + IL_10))) - 0.5)))) - gamma*IL_17;
  IL_17RA' = (-exp(0.5*h) + exp(-1*h*((1 + 1)/1*(IL_17/(1 + IL_17)) - 0.5)))/((1 - exp(0.5*h))*(1 + exp(-1*h*((1 + 1)/1*(IL_17/(1 + IL_17)) - 0.5)))) - gamma*IL_17RA;
  IL_18' = (-exp(0.5*h) + exp(-1*h*((1 + 1)/1*(p65/(1 + p65)) - 0.5)))/((1 - exp(0.5*h))*(1 + exp(-1*h*((1 + 1)/1*(p65/(1 + p65)) - 0.5)))) - gamma*IL_18;
  IL_18RA' = (-exp(0.5*h) + exp(-1*h*((1 + 1)/1*(IL_18/(1 + IL_18)) - 0.5)))/((1 - exp(0.5*h))*(1 + exp(-1*h*((1 + 1)/1*(IL_18/(1 + IL_18)) - 0.5)))) - gamma*IL_18RA;
  IL_12' = (-exp(0.5*h) + exp(-1*h*((1 + 1)/1*(c_Jun/(1 + c_Jun)) - 0.5)))/((1 - exp(0.5*h))*(1 + exp(-1*h*((1 + 1)/1*(c_Jun/(1 + c_Jun)) - 0.5)))) - gamma*IL_12;
  IL_12R' = (-exp(0.5*h) + exp(-1*h*((1 + 1)/1*(IL_12/(1 + IL_12)) - 0.5)))/((1 - exp(0.5*h))*(1 + exp(-1*h*((1 + 1)/1*(IL_12/(1 + IL_12)) - 0.5)))) - gamma*IL_12R;
  IFN_gamma' = (-exp(0.5*h) + exp(-1*h*((1 + 1)/1*(p65/(1 + p65)) - 0.5)))/((1 - exp(0.5*h))*(1 + exp(-1*h*((1 + 1)/1*(p65/(1 + p65)) - 0.5)))) - gamma*IFN_gamma;
  IFN_gammaR' = (-exp(0.5*h) + exp(-1*h*((1 + 1)/1*(IFN_gamma/(1 + IFN_gamma)) - 0.5)))/((1 - exp(0.5*h))*(1 + exp(-1*h*((1 + 1)/1*(IFN_gamma/(1 + IFN_gamma)) - 0.5)))) - gamma*IFN_gammaR;
  TNF' = (-exp(0.5*h) + exp(-1*h*((2 + 1)/2*((p65 + AP_1)/(1 + p65 + AP_1))*(1 - (2 + 1)/2*((STAT3 + akt1)/(1 + STAT3 + akt1))) - 0.5)))/((1 - exp(0.5*h))*(1 + exp(-1*h*((2 + 1)/2*((p65 + AP_1)/(1 + p65 + AP_1))*(1 - (2 + 1)/2*((STAT3 + akt1)/(1 + STAT3 + akt1))) - 0.5)))) - gamma*TNF;
  TNFR1' = (-exp(0.5*h) + exp(-1*h*((1 + 1)/1*(TNF/(1 + TNF))*(1 - (1 + 1)/1*(PGRN/(1 + PGRN))) - 0.5)))/((1 - exp(0.5*h))*(1 + exp(-1*h*((1 + 1)/1*(TNF/(1 + TNF))*(1 - (1 + 1)/1*(PGRN/(1 + PGRN))) - 0.5)))) - gamma*TNFR1;
  IL_10' = (-exp(0.5*h) + exp(-1*h*((2 + 1)/2*((CREB + STAT3)/(1 + CREB + STAT3)) - 0.5)))/((1 - exp(0.5*h))*(1 + exp(-1*h*((2 + 1)/2*((CREB + STAT3)/(1 + CREB + STAT3)) - 0.5)))) - gamma*IL_10;
  IL_10R1' = (-exp(0.5*h) + exp(-1*h*((1 + 1)/1*(IL_10/(1 + IL_10)) - 0.5)))/((1 - exp(0.5*h))*(1 + exp(-1*h*((1 + 1)/1*(IL_10/(1 + IL_10)) - 0.5)))) - gamma*IL_10R1;
  IL_4' = (-exp(0.5*h) + exp(-1*h*((1 + 1)/1*(GATA3/(1 + GATA3)) - 0.5)))/((1 - exp(0.5*h))*(1 + exp(-1*h*((1 + 1)/1*(GATA3/(1 + GATA3)) - 0.5)))) - gamma*IL_4;
  IL_4R' = (-exp(0.5*h) + exp(-1*h*((1 + 1)/1*(IL_4/(1 + IL_4)) - 0.5)))/((1 - exp(0.5*h))*(1 + exp(-1*h*((1 + 1)/1*(IL_4/(1 + IL_4)) - 0.5)))) - gamma*IL_4R;
  IL_1Ra' = (-exp(0.5*h) + exp(-1*h*((1 + 1)/1*(STAT6/(1 + STAT6)) - 0.5)))/((1 - exp(0.5*h))*(1 + exp(-1*h*((1 + 1)/1*(STAT6/(1 + STAT6)) - 0.5)))) - gamma*IL_1Ra;
  CSF2' = (-exp(0.5*h) + exp(-1*h*((1 + 1)/1*(IL_1beta/(1 + IL_1beta)) - 0.5)))/((1 - exp(0.5*h))*(1 + exp(-1*h*((1 + 1)/1*(IL_1beta/(1 + IL_1beta)) - 0.5)))) - gamma*CSF2;
  GMR' = (-exp(0.5*h) + exp(-1*h*((1 + 1)/1*(CSF2/(1 + CSF2)) - 0.5)))/((1 - exp(0.5*h))*(1 + exp(-1*h*((1 + 1)/1*(CSF2/(1 + CSF2)) - 0.5)))) - gamma*GMR;
  CCL3_4' = (-exp(0.5*h) + exp(-1*h*((2 + 1)/2*((p65 + p38)/(1 + p65 + p38)) - 0.5)))/((1 - exp(0.5*h))*(1 + exp(-1*h*((2 + 1)/2*((p65 + p38)/(1 + p65 + p38)) - 0.5)))) - gamma*CCL3_4;
  IL_8' = (-exp(0.5*h) + exp(-1*h*((2 + 1)/2*((p65 + p38)/(1 + p65 + p38))*(1 - (1 + 1)/1*(STAT3/(1 + STAT3))) - 0.5)))/((1 - exp(0.5*h))*(1 + exp(-1*h*((2 + 1)/2*((p65 + p38)/(1 + p65 + p38))*(1 - (1 + 1)/1*(STAT3/(1 + STAT3))) - 0.5)))) - gamma*IL_8;
  CXCR1' = (-exp(0.5*h) + exp(-1*h*((1 + 1)/1*(IL_8/(1 + IL_8)) - 0.5)))/((1 - exp(0.5*h))*(1 + exp(-1*h*((1 + 1)/1*(IL_8/(1 + IL_8)) - 0.5)))) - gamma*CXCR1;
  TLR' = (-exp(0.5*h) + exp(-1*h*((3 + 1)/3*((IL_1beta + IFN_gamma + TNF)/(1 + IL_1beta + IFN_gamma + TNF)) - 0.5)))/((1 - exp(0.5*h))*(1 + exp(-1*h*((3 + 1)/3*((IL_1beta + IFN_gamma + TNF)/(1 + IL_1beta + IFN_gamma + TNF)) - 0.5)))) - gamma*TLR;
  iNOS' = (-exp(0.5*h) + exp(-1*h*((2 + 1)/2*((p65 + STAT1)/(1 + p65 + STAT1))*(1 - (1 + 1)/1*(IL_1Ra/(1 + IL_1Ra))) - 0.5)))/((1 - exp(0.5*h))*(1 + exp(-1*h*((2 + 1)/2*((p65 + STAT1)/(1 + p65 + STAT1))*(1 - (1 + 1)/1*(IL_1Ra/(1 + IL_1Ra))) - 0.5)))) - gamma*iNOS;
  p65' = (-exp(0.5*h) + exp(-1*h*((6 + 1)/6*((IL_1R1 + IL_17RA + TNFR1 + TLR + Ikk + CGRP)/(1 + IL_1R1 + IL_17RA + TNFR1 + TLR + Ikk + CGRP))*(1 - (5 + 1)/5*((BMPR + IkBalpha + SOCS_3 + SIRT1 + wnt5a)/(1 + BMPR + IkBalpha + SOCS_3 + SIRT1 + wnt5a))) - 0.5)))/((1 - exp(0.5*h))*(1 + exp(-1*h*((6 + 1)/6*((IL_1R1 + IL_17RA + TNFR1 + TLR + Ikk + CGRP)/(1 + IL_1R1 + IL_17RA + TNFR1 + TLR + Ikk + CGRP))*(1 - (5 + 1)/5*((BMPR + IkBalpha + SOCS_3 + SIRT1 + wnt5a)/(1 + BMPR + IkBalpha + SOCS_3 + SIRT1 + wnt5a))) - 0.5)))) - gamma*p65;
  IkBalpha' = (-exp(0.5*h) + exp(-1*h*(1 - (1 + 1)/1*(Ikk/(1 + Ikk)) - 0.5)))/((1 - exp(0.5*h))*(1 + exp(-1*h*(1 - (1 + 1)/1*(Ikk/(1 + Ikk)) - 0.5)))) - gamma*IkBalpha;
  Ikk' = (-exp(0.5*h) + exp(-1*h*((1 + 1)/1*(TRAF6/(1 + TRAF6)) - 0.5)))/((1 - exp(0.5*h))*(1 + exp(-1*h*((1 + 1)/1*(TRAF6/(1 + TRAF6)) - 0.5)))) - gamma*Ikk;
  TRAF6' = (-exp(0.5*h) + exp(-1*h*((4 + 1)/4*((IL_1R1 + IL_18RA + TLR + Act1)/(1 + IL_1R1 + IL_18RA + TLR + Act1))*(1 - (1 + 1)/1*(SOCS_3/(1 + SOCS_3))) - 0.5)))/((1 - exp(0.5*h))*(1 + exp(-1*h*((4 + 1)/4*((IL_1R1 + IL_18RA + TLR + Act1)/(1 + IL_1R1 + IL_18RA + TLR + Act1))*(1 - (1 + 1)/1*(SOCS_3/(1 + SOCS_3))) - 0.5)))) - gamma*TRAF6;
  Act1' = (-exp(0.5*h) + exp(-1*h*((1 + 1)/1*(IL_17RA/(1 + IL_17RA)) - 0.5)))/((1 - exp(0.5*h))*(1 + exp(-1*h*((1 + 1)/1*(IL_17RA/(1 + IL_17RA)) - 0.5)))) - gamma*Act1;
  ERK' = (-exp(0.5*h) + exp(-1*h*((8 + 1)/8*((TGF_beta + IGF1R + IL_1R1 + TNFR1 + TLR + JNK + SIRT2 + CGRP)/(1 + TGF_beta + IGF1R + IL_1R1 + TNFR1 + TLR + JNK + SIRT2 + CGRP)) - 0.5)))/((1 - exp(0.5*h))*(1 + exp(-1*h*((8 + 1)/8*((TGF_beta + IGF1R + IL_1R1 + TNFR1 + TLR + JNK + SIRT2 + CGRP)/(1 + TGF_beta + IGF1R + IL_1R1 + TNFR1 + TLR + JNK + SIRT2 + CGRP)) - 0.5)))) - gamma*ERK;
  c_Jun' = (-exp(0.5*h) + exp(-1*h*((3 + 1)/3*((IL_1R1 + JNK + p38)/(1 + IL_1R1 + JNK + p38))*(1 - (1 + 1)/1*(SIRT1/(1 + SIRT1))) - 0.5)))/((1 - exp(0.5*h))*(1 + exp(-1*h*((3 + 1)/3*((IL_1R1 + JNK + p38)/(1 + IL_1R1 + JNK + p38))*(1 - (1 + 1)/1*(SIRT1/(1 + SIRT1))) - 0.5)))) - gamma*c_Jun;
  JNK' = (-exp(0.5*h) + exp(-1*h*((7 + 1)/7*((IL_17RA + TNFR1 + TLR + TRAF6 + ROS + wnt5a + CGRP)/(1 + IL_17RA + TNFR1 + TLR + TRAF6 + ROS + wnt5a + CGRP))*(1 - (1 + 1)/1*(SOCS_3/(1 + SOCS_3))) - 0.5)))/((1 - exp(0.5*h))*(1 + exp(-1*h*((7 + 1)/7*((IL_17RA + TNFR1 + TLR + TRAF6 + ROS + wnt5a + CGRP)/(1 + IL_17RA + TNFR1 + TLR + TRAF6 + ROS + wnt5a + CGRP))*(1 - (1 + 1)/1*(SOCS_3/(1 + SOCS_3))) - 0.5)))) - gamma*JNK;
  p38' = (-exp(0.5*h) + exp(-1*h*((7 + 1)/7*((IL_1R1 + IL_6R + IL_17RA + TNFR1 + TLR + TRAF6 + CGRP)/(1 + IL_1R1 + IL_6R + IL_17RA + TNFR1 + TLR + TRAF6 + CGRP))*(1 - (1 + 1)/1*(IL_10/(1 + IL_10))) - 0.5)))/((1 - exp(0.5*h))*(1 + exp(-1*h*((7 + 1)/7*((IL_1R1 + IL_6R + IL_17RA + TNFR1 + TLR + TRAF6 + CGRP)/(1 + IL_1R1 + IL_6R + IL_17RA + TNFR1 + TLR + TRAF6 + CGRP))*(1 - (1 + 1)/1*(IL_10/(1 + IL_10))) - 0.5)))) - gamma*p38;
  CREB' = (-exp(0.5*h) + exp(-1*h*((2 + 1)/2*((ERK + akt1)/(1 + ERK + akt1))*(1 - (2 + 1)/2*((p65 + JNK)/(1 + p65 + JNK))) - 0.5)))/((1 - exp(0.5*h))*(1 + exp(-1*h*((2 + 1)/2*((ERK + akt1)/(1 + ERK + akt1))*(1 - (2 + 1)/2*((p65 + JNK)/(1 + p65 + JNK))) - 0.5)))) - gamma*CREB;
  AP_1' = (-exp(0.5*h) + exp(-1*h*((3 + 1)/3*((c_Jun + JNK + p38)/(1 + c_Jun + JNK + p38))*(1 - (1 + 1)/1*(SIRT1/(1 + SIRT1))) - 0.5)))/((1 - exp(0.5*h))*(1 + exp(-1*h*((3 + 1)/3*((c_Jun + JNK + p38)/(1 + c_Jun + JNK + p38))*(1 - (1 + 1)/1*(SIRT1/(1 + SIRT1))) - 0.5)))) - gamma*AP_1;
  JAK' = (-exp(0.5*h) + exp(-1*h*((6 + 1)/6*((IL_6R + IL_17RA + IL_12R + IFN_gammaR + IL_10R1 + IL_4R)/(1 + IL_6R + IL_17RA + IL_12R + IFN_gammaR + IL_10R1 + IL_4R))*(1 - (1 + 1)/1*(SOCS_3/(1 + SOCS_3))) - 0.5)))/((1 - exp(0.5*h))*(1 + exp(-1*h*((6 + 1)/6*((IL_6R + IL_17RA + IL_12R + IFN_gammaR + IL_10R1 + IL_4R)/(1 + IL_6R + IL_17RA + IL_12R + IFN_gammaR + IL_10R1 + IL_4R))*(1 - (1 + 1)/1*(SOCS_3/(1 + SOCS_3))) - 0.5)))) - gamma*JAK;
  STAT1' = (-exp(0.5*h) + exp(-1*h*((2 + 1)/2*((IFN_gammaR + JAK)/(1 + IFN_gammaR + JAK)) - 0.5)))/((1 - exp(0.5*h))*(1 + exp(-1*h*((2 + 1)/2*((IFN_gammaR + JAK)/(1 + IFN_gammaR + JAK)) - 0.5)))) - gamma*STAT1;
  STAT3' = (-exp(0.5*h) + exp(-1*h*((1 + 1)/1*(JAK/(1 + JAK))*(1 - (1 + 1)/1*(IL_1R1/(1 + IL_1R1))) - 0.5)))/((1 - exp(0.5*h))*(1 + exp(-1*h*((1 + 1)/1*(JAK/(1 + JAK))*(1 - (1 + 1)/1*(IL_1R1/(1 + IL_1R1))) - 0.5)))) - gamma*STAT3;
  STAT6' = (-exp(0.5*h) + exp(-1*h*((1 + 1)/1*(JAK/(1 + JAK))*(1 - (1 + 1)/1*(p65/(1 + p65))) - 0.5)))/((1 - exp(0.5*h))*(1 + exp(-1*h*((1 + 1)/1*(JAK/(1 + JAK))*(1 - (1 + 1)/1*(p65/(1 + p65))) - 0.5)))) - gamma*STAT6;
  SOCS_3' = (-exp(0.5*h) + exp(-1*h*((1 + 1)/1*(STAT3/(1 + STAT3))*(1 - (1 + 1)/1*(p65/(1 + p65))) - 0.5)))/((1 - exp(0.5*h))*(1 + exp(-1*h*((1 + 1)/1*(STAT3/(1 + STAT3))*(1 - (1 + 1)/1*(p65/(1 + p65))) - 0.5)))) - gamma*SOCS_3;
  akt1' = (-exp(0.5*h) + exp(-1*h*((3 + 1)/3*((TGFBRI + IGF1R + SIRT1)/(1 + TGFBRI + IGF1R + SIRT1))*(1 - (1 + 1)/1*(IL_1R1/(1 + IL_1R1))) - 0.5)))/((1 - exp(0.5*h))*(1 + exp(-1*h*((3 + 1)/3*((TGFBRI + IGF1R + SIRT1)/(1 + TGFBRI + IGF1R + SIRT1))*(1 - (1 + 1)/1*(IL_1R1/(1 + IL_1R1))) - 0.5)))) - gamma*akt1;
  SIRT1' = (-exp(0.5*h) + exp(-1*h*((1 + 1)/1*(FOXO/(1 + FOXO))*(1 - (1 + 1)/1*(TLR/(1 + TLR))) - 0.5)))/((1 - exp(0.5*h))*(1 + exp(-1*h*((1 + 1)/1*(FOXO/(1 + FOXO))*(1 - (1 + 1)/1*(TLR/(1 + TLR))) - 0.5)))) - gamma*SIRT1;
  SIRT2' = (-exp(0.5*h) + exp(-1*h*(0 - 0.5)))/((1 - exp(0.5*h))*(1 + exp(-1*h*(0 - 0.5)))) - gamma*SIRT2;
  ROS' = (-exp(0.5*h) + exp(-1*h*((1 + 1)/1*(TNF/(1 + TNF))*(1 - (2 + 1)/2*((akt1 + SIRT2)/(1 + akt1 + SIRT2))) - 0.5)))/((1 - exp(0.5*h))*(1 + exp(-1*h*((1 + 1)/1*(TNF/(1 + TNF))*(1 - (2 + 1)/2*((akt1 + SIRT2)/(1 + akt1 + SIRT2))) - 0.5)))) - gamma*ROS;
  FOXO' = (-exp(0.5*h) + exp(-1*h*((2 + 1)/2*((JNK + p38)/(1 + JNK + p38))*(1 - (1 + 1)/1*(akt1/(1 + akt1))) - 0.5)))/((1 - exp(0.5*h))*(1 + exp(-1*h*((2 + 1)/2*((JNK + p38)/(1 + JNK + p38))*(1 - (1 + 1)/1*(akt1/(1 + akt1))) - 0.5)))) - gamma*FOXO;
  wnt3a' = (-exp(0.5*h) + exp(-1*h*((1 + 1)/1*(TNFR1/(1 + TNFR1)) - 0.5)))/((1 - exp(0.5*h))*(1 + exp(-1*h*((1 + 1)/1*(TNFR1/(1 + TNFR1)) - 0.5)))) - gamma*wnt3a;
  wnt5a' = (-exp(0.5*h) + exp(-1*h*((1 + 1)/1*(p65/(1 + p65)) - 0.5)))/((1 - exp(0.5*h))*(1 + exp(-1*h*((1 + 1)/1*(p65/(1 + p65)) - 0.5)))) - gamma*wnt5a;
  beta_catenin' = (-exp(0.5*h) + exp(-1*h*((1 + 1)/1*(wnt3a/(1 + wnt3a)) - 0.5)))/((1 - exp(0.5*h))*(1 + exp(-1*h*((1 + 1)/1*(wnt3a/(1 + wnt3a)) - 0.5)))) - gamma*beta_catenin;
  CGRP' = (-exp(0.5*h) + exp(-1*h*((1 + 1)/1*(IL_1beta/(1 + IL_1beta)) - 0.5)))/((1 - exp(0.5*h))*(1 + exp(-1*h*((1 + 1)/1*(IL_1beta/(1 + IL_1beta)) - 0.5)))) - gamma*CGRP;
  GATA3' = (-exp(0.5*h) + exp(-1*h*((1 + 1)/1*(STAT6/(1 + STAT6))*(1 - (1 + 1)/1*(STAT1/(1 + STAT1))) - 0.5)))/((1 - exp(0.5*h))*(1 + exp(-1*h*((1 + 1)/1*(STAT6/(1 + STAT6))*(1 - (1 + 1)/1*(STAT1/(1 + STAT1))) - 0.5)))) - gamma*GATA3;
  RUNX2' = (-exp(0.5*h) + exp(-1*h*((1 + 1)/1*(wnt3a/(1 + wnt3a)) - 0.5)))/((1 - exp(0.5*h))*(1 + exp(-1*h*((1 + 1)/1*(wnt3a/(1 + wnt3a)) - 0.5)))) - gamma*RUNX2;

  // Unit definitions:
  unit time_unit = second;
  unit arbitrary_units = dimensionless;
end
